OpenVSP model (file version 5), 5 components.
Geometry view with OpenVSP parameter names; values to 6 digits, angles in degrees, lengths in the model's unit.
Overall bounding box: X_Min=0 X_Len=61.4533 Y_Min=-36.125 Y_Len=72.25 Z_Min=-4.47468 Z_Len=17.8865

Fuselage "FuselageGeom"
  location (X Y Z) 0.7173 0 0, rotation 180 0 0
  bounding box size 55.0833 6.40023 9.07634
  Design: Length=55.0833
  cross sections:
    n  XLocPercent  YLocPercent  ZLocPercent  shape
    0  0            0            0            point
    1  0.129707     0            -0.00277218  ellipse Ellipse_Height=4.41577 Ellipse_Width=4.71596
    2  0.171027     0            -0.015       ellipse Ellipse_Height=5.87 Ellipse_Width=4.89688
    3  0.207757     0            -0.02        ellipse Ellipse_Height=7 Ellipse_Width=5.18806
    4  0.442421     0            -0.005       ellipse Ellipse_Height=8.04762 Ellipse_Width=6.40023
    5  0.677085     0            0.018        ellipse Ellipse_Height=6.96635 Ellipse_Width=4.82089
    6  0.823762     0            0            ellipse Ellipse_Height=6.4 Ellipse_Width=2.59543
    7  1            0            -0.0489608   ellipse Ellipse_Height=0 Ellipse_Width=0

Wing "WingGeom", child of "FuselageGeom"
  location (X Y Z) 22.8229 0 3.48495, rotation 180 0 0
  symmetric about XZ
  bounding box size 6.50204 72.25 0.972617
  totals: TotalSpan=72.25 TotalProjectedSpan=72.25 TotalChord=5.925 TotalArea=428.081 TotalAR=12.1941
  root: chord 6.5, twist -3.07087, NACA 4-series Camber=0.04 CamberLoc=0.4 Invert=1 ThickChord=0.12
  sections:
    n  Span     Root_Chord  Tip_Chord  Area     Sweep  Sweep_Location  Dihedral  Twist  Twist_Location  tip airfoil
    1  18.0625  6.5         6.5        117.406  0      0               0         0      0               as above
    2  18.0625  6.5         4.2        96.6344  0      0               0         0      0               as above
  SS_Control "Aileron": UStart=0.55 UEnd=0.72 Length_C_Start=0.25 Length_C_End=0.25 Length_Start=1.51 Length_End=1.119 LE_Flag=0 Surf_Type=2
  SS_Control "Flaps": UStart=0.308824 UEnd=0.5 Length_C_Start=0.25 Length_C_End=0.25 Length_Start=1.62458 Length_End=1.625 LE_Flag=0 Surf_Type=2

Wing "WingGeom", child of "WingGeom"
  location (X Y Z) 52.8537 0 11.9915, rotation 180 1.25 0
  symmetric about XZ
  bounding box size 8.59969 16 0.536553
  totals: TotalSpan=16 TotalProjectedSpan=16 TotalChord=4.14862 TotalArea=66.378 TotalAR=3.8567
  root: chord 5.29724, twist 0, NACA 4-series Camber=0 CamberLoc=0.2 ThickChord=0.1
  sections:
    n  Span  Root_Chord  Tip_Chord  Area    Sweep  Sweep_Location  Dihedral  Twist  Twist_Location  tip airfoil
    1  8     5.29724     3          33.189  35     0               0         0      0.25            as above
  SS_Control "Elevator": UStart=0.35 UEnd=0.65 Length_C_Start=0.3 Length_C_End=0.3 Length_Start=1.55471 Length_End=0.934459 LE_Flag=0 Surf_Type=2

Wing "WingGeom"
  location (X Y Z) 41.5488 0 0.411835, rotation 90 0 0
  bounding box size 17.3235 1.08476 13
  totals: TotalSpan=13 TotalProjectedSpan=13 TotalChord=9.08528 TotalArea=110.59 TotalAR=1.52817
  root: chord 10.4173, twist 0, NACA 4-series Camber=0 CamberLoc=0.2 ThickChord=0.1
  sections:
    n  Span  Root_Chord  Tip_Chord  Area     Sweep    Sweep_Location  Dihedral  Twist  Twist_Location  tip airfoil
    1  3.25  10.4173     10.8413    34.5452  44.2143  0               0         0      0.25            as above
    2  3.25  10.8413     8.8683     32.028   44.2143  0               0         0      0.25            as above
    3  6.5   8.8683      4.6752     44.0164  44.2143  0               0         0      0.25            as above
  SS_Control "Rudder": UStart=0.465686 UEnd=0.715686 Length_C_Start=0.3 Length_C_End=0.3 Length_Start=3.05799 Length_End=1.93286 LE_Flag=0 Surf_Type=2

Blank "BlankGeom"
  location (X Y Z) 24.4387 0 0, rotation 0 0 0
  mass: Density=1 Shell_Flag=0 Mass_Area=1 Mass_Prior=0 PointMass=19000 CGx=0 CGy=0 CGz=0 Ixx=0 Iyy=0 Izz=0 Ixy=0 Ixz=0 Iyz=0

VSPAERO settings: Sref=428.081 bref=72.25 cref=5.925 Xcg=24.6755 Ycg=0 Zcg=-0.0469776 AlphaStart=-5 AlphaEnd=15 AlphaNpts=42 BetaStart=0 BetaEnd=0 BetaNpts=1 MachStart=0.24 MachEnd=0.3 MachNpts=1 ReCref=1e+07 Vinf=83.2051 Rho=1.12
  control group "Aileron": DeflectionAngle=0
  control group "Flaps": DeflectionAngle=0
  control group "Elevator": DeflectionAngle=0
  control group "Rudder": DeflectionAngle=0
